variable NREP index 1
variable newton_pair delete
variable newton_pair index off
newton off
units real
atom_style charge
atom_modify map array
lattice diamond 3.77
region box block 0 1 0 1 0 1
create_box 3 box
create_atoms 1 box
mass * 12.0
plugin load ${PLUGIN_SO}
pair_style reaxff/metal NULL
pair_coeff * * ffield.reax.mattsson H C O
run 0
